!工研封裝取下(倒角子模型)2017/02/27

finish
/clear
/filname,ppackage-sub

/prep7
pi=3.1415926
!!!!!材料等效
fs=(61**2)*((27.5)**2)*pi/(10000**2)			$fa=1-fs

!Al Pad+SiNx等效
EAl=70					$ESiNx=112
VAl=0.24				$VSiNx=0.24
GAl=EAL/(2*(1+VAl))		$GSiNx=ESiNx/(2*(1+VSiNx))
fAl=0.5			$fSiNx=0.5 			!體積比
EY_3=fAl*EAl+fSiNx*ESiNx
V_3= fAl*VAl+fSiNx*VSiNx
G_3= fAl*GAl+fSiNx*GSiNx

!UBM等效
ETI=102.6			$ECU=120
VTI=0.32			$VCU=0.34
GTI=ETI/(2*(1+VTI))	$GCu=ECu/(2*(1+VCu))
fTI=0.1/(0.1+0.2)	$fCU=0.2/(0.1+0.2)		!體積比
!EX_UBM=1/((fTI/ETI)+(fCU/ECU)-(fTI*fCU*(VTI*ECU-VCU*ETI)**2/(ETI*ECU*(fTI*ETI+fCU*ECU))))
E_UBM=fTI*ETI+fCU*ECU
V_UBM=fTI*VTI+fCU*VCU
G_UBM=fTI*GTI+fCU*GCU

!RDL3_D1+UBM等效
EPI=6.5				$EUBM=E_UBM
VPI=0.3				$VUBM=V_UBM
GPI=EPI/(2*(1+VPI))	$GUBM=EUBM/(2*(1+VUBM))
fPI=fa  	$fUBM=fs 			!體積比
EX_4=1/((fPI/EPI)+(fUBM/EUBM)-(fPI*fUBM*(VPI*EUBM-VUBM*EPI)**2/(EPI*EUBM*(fPI*EPI+fUBM*EUBM))))
EY_4=fPI*EPI+fUBM*EUBM
V_4= fPI*VPI+fUBM*VUBM
G_4= fPI*GPI+fUBM*GUBM

!Cu pillar+UBM等效
ECu=120				$EUBM=E_UBM
VCu=0.4				$VUBM=V_UBM
GCu=ECu/(2*(1+VCu))$GUBM=EUBM/(2*(1+VUBM))
fCu=((45/2)**2)*pi/(pi*(45/2+0.3)**2)	$fUBM=1-fCu 			!體積比
!EX_CuUBM=1/((fCu/ECu)+(fUBM/EUBM)-(fCu*fUBM*(VCu*EUBM-VUBM*ECu)**2/(ECu*EUBM*(fCu*ECu+fUBM*EUBM))))
EY_CuUBM=fCu*ECu+fUBM*EUBM
V_CuUBM= fCu*VCu+fUBM*VUBM
G_CuUBM= fCu*GCu+fUBM*GUBM

!PI+Cu pillar+UBM等效
EPI=6.5				$ECuUBM=EY_CuUBM
VPI=0.3				$VCuUBM=V_CuUBM
GPI=EPI/(2*(1+VPI))	$GCuUBM=ECuUBM/(2*(1+VCuUBM))
fPI=fa	 	$fCuUBM=fs 			!體積比
EX_5=1/((fPI/EPI)+(fCuUBM/ECuUBM)-(fPI*fCuUBM*(VPI*ECuUBM-VCuUBM*EPI)**2/(EPI*ECuUBM*(fPI*EPI+fCuUBM*ECuUBM))))
EY_5=fPI*EPI+fCuUBM*ECuUBM
V_5= fPI*VPI+fCuUBM*VCuUBM
G_5= fPI*GPI+fCuUBM*GCuUBM

!underfill+Cu等效
ECu=120				$Euf=11
VCu=0.4				$Vuf=0.36
GCu=ECu/(2*(1+VCu))	$Guf=Euf/(2*(1+Vuf))
fCu=fs				$fuf=fa 			!體積比
EX_6=1/((fCu/ECu)+(fuf/Euf)-(fCu*fuf*(VCu*Euf-Vuf*ECu)**2/(ECu*Euf*(fCu*ECu+fuf*Euf))))
EY_6=fCu*ECu+fuf*Euf
V_6= fCu*VCu+fuf*Vuf
G_6= fCu*GCu+fuf*Guf

!Epoxy+SnAg等效
ESnAg=55					$EEpoxy=11
VSnAg=0.365					$VEpoxy=0.36
GSnAg=ESnAg/(2*(1+VSnAg))	$GEpoxy=EEpoxy/(2*(1+VEpoxy))
fSnAg=fs			$fEpoxy=fa 			!體積比
EX_7=1/((fSnAg/ESnAg)+(fEpoxy/EEpoxy)-(fSnAg*fEpoxy*(VSnAg*EEpoxy-VEpoxy*ESnAg)**2/(ESnAg*EEpoxy*(fSnAg*ESnAg+fEpoxy*EEpoxy))))
EY_7=fSnAg*ESnAg+fEpoxy*EEpoxy
V_7= fSnAg*VSnAg+fEpoxy*VEpoxy
G_7= fSnAg*GSnAg+fEpoxy*GEpoxy

!SnAg+UBM等效
ESnAg=55					$EUBM=E_UBM
VSnAg=0.365					$VUBM=V_UBM
GSnAg=ESnAg/(2*(1+VSnAg))	$GUBM=EUBM/(2*(1+VUBM))
fSnAg=((45/2)**2)*pi/(pi*(45/2+0.3)**2)	$fUBM=1-fSnAg 			!體積比
EY_SnAgUBM=fSnAg*ESnAg+fUBM*EUBM
V_SnAgUBM= fSnAg*VSnAg+fUBM*VUBM
G_SnAgUBM= fSnAg*GSnAg+fUBM*GUBM

!D1+SnAg+UBM等效
ESnAgUBM=EY_SnAgUBM					$ED1=36
VSnAgUBM=V_SnAgUBM					$VD1=0.22
GSnAgUBM=ESnAgUBM/(2*(1+VSnAgUBM))	$GD1=ED1/(2*(1+VD1))
fSnAgUBM=fS				$fD1=fa 			!體積比
EX_8=1/((fSnAgUBM/ESnAgUBM)+(fD1/ED1)-(fSnAgUBM*fD1*(VSnAgUBM*ED1-VD1*ESnAgUBM)**2/(ESnAgUBM*ED1*(fSnAgUBM*ESnAgUBM+fD1*ED1))))
EY_8=fSnAgUBM*ESnAgUBM+fD1*ED1
V_8= fSnAgUBM*VSnAgUBM+fD1*VD1
G_8= fSnAgUBM*GSnAgUBM+fD1*GD1

!D1+UBM等效
EUBM=E_UBM				$ED1=36
VUBM=V_UBM				$VD1=0.22
GUBM=EUBM/(2*(1+VUBM))	$GD1=ED1/(2*(1+VD1))
fUBM=fs 		$fD1=fa 			!體積比
EX_9=1/((fUBM/EUBM)+(fD1/ED1)-(fUBM*fD1*(VUBM*ED1-VD1*EUBM)**2/(EUBM*ED1*(fUBM*EUBM+fD1*ED1))))
EY_9=fUBM*EUBM+fD1*ED1
V_9= fUBM*VUBM+fD1*VD1
G_9= fUBM*GUBM+fD1*GD1

!-----------------
!參數設定
t1=100 	e-3		$E1=21.5	e3	  	$V1=0.3   		!EMC
t2=250	e-3		$E2=165		e3     	$V2=0.26		!DIE(Chip)
t3=2.8	e-3		$E3=Ey_3*1000     	$V3=V_3	 		!Al Pad+SiNx
                $G3=G_3*1000

				!4-9層都是等效的材料 EE部分是未等效部分
t4=0.3	e-3		$E4y=EY_4*1000	     $V4=V_4		!PI+UBM
				$E4=EX_4*1000	 	 $G4=G_4*1000
				$EE4=EPI*1000		 $VV4=VPI		!PI
t5=4.7  e-3		$E5y=EY_5*1000	     $V5=V_5		!PI+UBM+Cu
				$E5=EX_5*1000	 	 $G5=G_5*1000
				$EE5=EPI*1000		 $VV5=VPI		!PI
t6=40	e-3		$E6y=EY_6*1000	     $V6=V_6		!underfill+Cu
				$E6=EX_6*1000	 	 $G6=G_6*1000
				$EE6=Euf*1000	 	 $VV6=Vuf		!underfill
t7=20	e-3		$E7y=EY_7*1000	     $V7=V_7		!Epoxy+SnAg
				$E7=EX_7*1000	 	 $G7=G_7*1000
				$EE7=EEpoxy*1000	 $VV7=VEpoxy	!Epoxy
t8=1.1	e-3		$E8=Ex_8*1000		 $V8=V_8	  	!RDL3_D1+UBM+SnAg
				$E8y=Ey_8*1000	 	 $G8=G_8*1000
				$EE8=ED1*1000	 	 $VV8=VD1		!D1
t9=0.3	e-3		$E9=EX_9*1000	     $V9=V_9		!RDL3_D1+UBM
				$E9y=Ey_9*1000	 	 $G9=G_9*1000
				$EE9=ED1*1000	 	 $VV9=VD1		!D1

t10=3.6	e-3		$E10=52.8	e3	     $V10=0.068		!RDL3
t11=1.4	e-3		$E11=36		e3	     $V11=0.22		!RDL2_D1
t12=3.6	e-3		$E12=52.8	e3	     $V12=0.068		!RDL2
t13=1.4	e-3		$E13=36		e3	     $V13=0.22		!RDL1_D1
t14=3.6	e-3		$E14=52.8	e3	     $V14=0.244		!RDL1
t15=1	e-3		$E15=36		e3	     $V15=0.22		!D1

t16=1	e-3		$E16=ESiNx*1000      $V16=VSiNx		!SiNx
t17=15	e-3		$E17=6.5	e3    	 $V17=0.3		!PI
t18=700	e-3		$E18=90.95	e3   	 $V18=0.3		!Glass
!t19=1			$E19=0.00649e3       $V19=0.49		!矽膠
!t20=3			$E20=2		e3       $V20=0.33		!壓克力

layer=18
cracklayer=17

y0=0
*do,I,1,layer,1
y%I%=y%I-1%+t%I%					!%I%=dummy index 1~11
*enddo


!----------
Lx=165	e-3			!子模型寬度
Ly=449	e-3			!子模型高度
tAA=35	e-3			!子模型AA間距寬度
tBB=45	e-3			!子模型BB間距寬度
tCC=55	e-3			!子模型CC間距寬度
LDie=10				!Die長度
Lgap=7.5*2			!Die之間間距
L=Lgap*2+LDie*2		!封裝總長度
La=Lgap/2*3+LDie	!預裂紋成長位置
diegap=50e-3		!子模型中心離第二顆die邊緣距離
Lw=La+diegap-Lx/2	!globle座標下子模型左下角x位置
!P1=-92e-3			!固定試片氣壓

da=0.0005			!裂紋尖端最細mesh size

!w=0.1				!切割的一單位
!ww=5				!探討應力的重點範圍
!fgap=2				!最高點與天花板距離
!dd=5				!吸盤內縮長度


!-----------------------------
save
seltol,1e-8
!幾何建模

*do,I,1,17,1
rectng,Lw+0,Lw+Lx,y%I-1%,y%I%
*enddo


ASEL,S,LOC,Y,Y3,Y9
ADELE,ALL,,,1
ALLSEL

LOCAL,11,0,Lw+Lx/2,y3		!座標系11銅柱正底部
wpcsys,11

!畫銅柱囉
*afun,deg
sita=ATAN(((tbb/2)-(taa/2))/t5)
Rfa=(90-sita)/2
ttt=t4*tan(Rfa)
	!下UBM
K,101,-tCC/2,0		$K,102,-taa/2,0		$K,103,taa/2,0		$K,104,tcc/2,0
K,105,tcc/2,t5		$K,106,tbb/2,t5		$k,107,-tbb/2,t5	$k,108,-tcc/2,t5
k,109,-tcc/2,t4+t5	$k,110,-(tbb/2-ttt),t4+t5	$k,111,(tbb/2-ttt),t4+t5	$k,112,tcc/2,t4+t5
k,113,-(taa/2-ttt),t4		$k,114,(taa/2-ttt),t4

	!上UBM
CSYS,0	$WPCSYS,0
LOCAL,12,0,Lw+Lx/2,y7-t4		!座標系12上UBM正底部
wpcsys,12
k,115,-tcc/2,0		$k,116,-(tbb/2-ttt),0	$k,117,(tbb/2-ttt),0	$k,118,tcc/2,0
K,119,tcc/2,t9		$K,120,tbb/2,t9			$k,121,-tbb/2,t9		$k,122,-tcc/2,t9
K,123,-tCC/2,t8+t9+t9	$K,124,-taa/2,t8+t9+t9		$K,125,taa/2,t8+t9+t9		$K,126,tcc/2,t8+t9+t9
k,127,-(taa/2-ttt),t8+t9		$k,128,(taa/2-ttt),t8+t9
SAVE

!下UBM描成線
L,108,107	$L,107,102	$L,102,103	$L,103,106	$L,106,105
L,109,110	$L,110,113	$L,113,114	$L,114,111	$L,111,112
LFILLT,14,15,0.01	$LFILLT,19,20,0.01
LFILLT,20,21,0.01	$LFILLT,15,16,0.01
L,108,109	$L,105,112	$L,107,110	$L,13,15
L,14,16		$L,17,19	$L,18,20	$L,106,111
CSYS,11	$WPCSYS,11
LSEL,S,LOC,Y,0,t4+t5	$LSEL,U,,,11
CM,DUBML,LINE
!下UBM描成面積
AL,27,13,29,18	$AL,29,14,30,19	$AL,30,23,31,24	$AL,31,15,32,20
AL,32,26,33,25	$AL,33,16,34,21	$AL,34,17,28,22
ASEL,S,LOC,Y,0,t4+t5
CM,DUBMA,AREA
alls
CSYS,0	$WPCSYS,0

!上ubm描成線
L,122,121	$L,121,124	$L,124,125	$L,125,120	$L,120,119
L,115,116	$L,116,127	$L,127,128	$L,128,117	$L,117,118
LFILLT,73,74,0.01	$LFILLT,36,69,0.01
LFILLT,69,70,0.01	$LFILLT,75,74,0.01
L,122,115	$L,121,116	$L,23,21	$L,24,22	$L,25,28
L,26,27		$L,120,117	$L,118,119
CSYS,12	$WPCSYS,12
LSEL,S,LOC,Y,0,t8+t9*2	$LSEL,U,,,37
CM,TUBML,LINE

!下UBM描成面積
AL,81,72,82,35	$AL,82,73,83,36	$AL,83,77,84,78	$AL,84,74,85,69
AL,85,80,86,79	$AL,86,75,87,70	$al,87,76,88,71
ASEL,S,LOC,Y,0,t8+t9*2
CM,TUBMA,AREA
alls
CSYS,0	$WPCSYS,0

!
A,123,115,118,126	$A,109,101,104,112
CSYS,0	$WPCSYS,0
asel,s,loc,y,y3,y9
aovlap,all
alls


!	!描成面積
!A,101,102,107,108	$A,108,107,110,109	$A,102,113,110,107
!A,102,103,114,113	$A,113,114,111,110	$A,103,106,111,114
!A,103,104,105,106	$A,106,105,112,111
!A,115,116,121,122	$A,116,117,128,127	$A,117,118,119,120
!A,116,127,124,121	$A,127,128,125,124	$A,128,117,120,125
!A,122,121,124,123	$A,120,119,126,125

CSYS,0	$WPCSYS,0
rectng,Lw+0,Lw+Lx,y5,y6	$rectng,Lw+0,Lw+Lx,y6,y7
ASEL,S,LOC,Y,Y6+T7/2
CSYS,12	$WPCSYS,12
WPROTA,0,-90	$ASBW,ALL
CSYS,12	$WPCSYS,12
ASEL,R,LOC,Y,0,T9
ADELE,ALL,,,1
ALLS
	!切
CSYS,0	$WPCSYS,0
KWPAVE,116
ASEL,S,LOC,Y,Y5,Y7-T9
WPROTA,0,0,-90	$ASBW,ALL
KWPAVE,117		$ASBW,ALL

ASEL,s,LOC,Y,Y9,Y17
KWPAVE,24		$ASBW,ALL
KWPAVE,25		$ASBW,ALL
ALLS
KWPAVE,122		$ASBW,ALL
KWPAVE,119		$ASBW,ALL
ASEL,S,LOC,Y,Y0,Y3
KWPAVE,14		$ASBW,ALL
KWPAVE,19		$ASBW,ALL

CSYS,0	$WPCSYS,0
rectng,Lw+0,Lw+Lx/2-tcc/2,y3,y3+t5	$rectng,Lw+0,Lw+Lx/2-tcc/2,y3+t5,y3+t5+t4
rectng,Lw+0,Lw+Lx/2-tcc/2,y7-t9,y7	$rectng,Lw+0,Lw+Lx/2-tcc/2,y7,y9
rectng,Lw+Lx/2+tcc/2,Lw+Lx,y3,y3+t5	$rectng,Lw+Lx/2+tcc/2,Lw+Lx,y3+t5,y3+t5+t4
rectng,Lw+Lx/2+tcc/2,Lw+Lx,y7-t9,y7	$rectng,Lw+Lx/2+tcc/2,Lw+Lx,y7,y9
ALLS
!AOVLAP,ALL
asel,s,,,33
WPROTA,0,0,-90
kwpave,21	$ASBW,ALL
kwpave,22	$ASBW,ALL
kwpave,27	$ASBW,ALL
kwpave,28	$ASBW,ALL
asel,s,,,30	$asel,a,,,31
kwpave,26	$ASBW,ALL
kwpave,23	$ASBW,ALL
alls
asel,s,,,32
kwpave,15	$ASBW,ALL
kwpave,16	$ASBW,ALL
kwpave,17	$ASBW,ALL
kwpave,18	$ASBW,ALL
asel,s,,,28	$asel,a,,,29
kwpave,20	$ASBW,ALL
kwpave,13	$ASBW,ALL
alls
L,239,233	$L,240,234
L,241,236	$L,242,235
CSYS,0	$WPCSYS,0
asel,s,loc,Y,y5,y7
asbl,all,97	$asbl,all,320	$asbl,all,321	$asbl,all,322
alls
asel,s,loc,y,y0,y3
asel,a,,,106	$asel,a,,,105
WPROTA,0,0,-90
kwpave,107	$ASBW,ALL
kwpave,13	$ASBW,ALL
kwpave,106	$ASBW,ALL
kwpave,20	$ASBW,ALL
asel,s,loc,y,y9,y%layer%
asel,a,,,100	$asel,a,,,99
kwpave,26	$ASBW,ALL
kwpave,120	$ASBW,ALL
kwpave,23	$ASBW,ALL
kwpave,121	$ASBW,ALL
alls

nummrg,kp
												save
!元素設定
et,1,plane182
keyopt,1,1,2			!有Bending開應變增強，但不好收斂
keyopt,1,3,2			!Plane strain

et,2,targe169
et,3,conta171

R,1

!*do,I,4,9,1
!MP,EX,I,E%I%
!MP,Ey,I,E%I%y
!MP,EZ,I,E%I%
!MP,PRXY,I,V%I%
!MP,PRYZ,I,V%I%
!MP,PRXZ,I,V%I%
!MP,GXY,I,G%I%
!*enddo
*do,I,4,9,1
MP,Ex,I+Layer,EE%I%
MP,PRXY,I+Layer,VV%I%
*enddo
*do,I,1,3,1
MP,Ex,I,E%I%
MP,PRXY,I,V%I%
*enddo
*do,I,10,layer,1
MP,Ex,I,E%I%
MP,PRXY,I,V%I%
*enddo

									save

!銅柱附近Mesh
CSYS,11	$WPCSYS,11
WPROTA,0,0,-90	$WPOFFS,0,0,tcc/2+t10	$ASBW,ALL
WPOFFS,0,0,-(tcc/2+t10)*2	$ASBW,ALL
CSYS,11	$WPCSYS,11
ASEL,S,LOC,X,-(tcc/2+t10),tcc/2+t10
ASEL,R,LOC,Y,-t3,y10-y3
lsla	$lesize,all,da
lplot
alls
								save

!切
WPROTA,0,90,0
WPOFFS,0,0,t6	$ASBW,ALL
WPOFFS,0,0,t6	$ASBW,ALL
WPOFFS,0,0,t6*2	$ASBW,ALL
CSYS,11	$WPCSYS,11
WPROTA,0,0,-90
WPOFFS,0,0,tcc/2+t10*3	$ASBW,ALL
WPOFFS,0,0,t10*3		$ASBW,ALL
CSYS,11	$WPCSYS,11
WPROTA,0,0,-90
WPOFFS,0,0,-(tcc/2+t10*3)	$ASBW,ALL
WPOFFS,0,0,-(t10*3)			$ASBW,ALL


!銅柱上方mesh
CSYS,0	$WPCSYS,0
lsel,s,loc,y,y10+t11/2	$lesize,all,,,2
lsel,s,loc,y,y11+t12/2	$lesize,all,,,6
lsel,s,loc,y,y12+t13/2	$lesize,all,,,2
lsel,s,loc,y,y13+t14/2	$lesize,all,,,6
lsel,s,loc,y,y14+t15/2	$lesize,all,,,2
lsel,s,loc,y,y15+t16/2	$lesize,all,,,2
lsel,s,loc,y,y16+t17/2	$lsel,r,loc,x,Lw	$lesize,all,,,12,1/2
lsel,s,loc,y,y16+t17/2	$lesize,all,,,12,2

CSYS,0	$WPCSYS,0
LOCAL,13,0,Lw+Lx/2,0		!座標系12正底部


lsel,s,loc,x,0	$lsel,r,loc,y,y11	$lesize,all,,,65
lsel,s,loc,x,0	$lsel,r,loc,y,y12	$lesize,all,,,60
lsel,s,loc,x,0	$lsel,r,loc,y,y13	$lesize,all,,,60
lsel,s,loc,x,0	$lsel,r,loc,y,y14	$lesize,all,,,50
lsel,s,loc,x,0	$lsel,r,loc,y,y15	$lesize,all,,,50
lsel,s,loc,x,0	$lsel,r,loc,y,y16	$lesize,all,,,50
lsel,s,loc,x,0	$lsel,r,loc,y,y17	$lesize,all,,,20

ASEL,S,LOC,Y,Y9,Y17
lsla	$lsel,r,loc,x,-taa/2,taa/2		$lsel,r,loc,y,y11	$lesize,all,,,6
lsla	$lsel,r,loc,x,-taa/2,taa/2		$lsel,r,loc,y,y12	$lesize,all,,,6
lsla	$lsel,r,loc,x,-taa/2,taa/2		$lsel,r,loc,y,y13	$lesize,all,,,6
lsla	$lsel,r,loc,x,-taa/2,taa/2		$lsel,r,loc,y,y14	$lesize,all,,,4
lsla	$lsel,r,loc,x,-taa/2,taa/2		$lsel,r,loc,y,y15	$lesize,all,,,4
lsla	$lsel,r,loc,x,-taa/2,taa/2		$lsel,r,loc,y,y16	$lesize,all,,,4
lsla	$lsel,r,loc,x,-taa/2,taa/2		$lsel,r,loc,y,y17	$lesize,all,,,2

lsla	$lsel,r,loc,x,-tbb/2,tbb/2		$lsel,r,loc,y,y11	$lesize,all,,,8
lsla	$lsel,r,loc,x,-tbb/2,tbb/2		$lsel,r,loc,y,y12	$lesize,all,,,8
lsla	$lsel,r,loc,x,-tbb/2,tbb/2		$lsel,r,loc,y,y13	$lesize,all,,,8
lsla	$lsel,r,loc,x,-tbb/2,tbb/2		$lsel,r,loc,y,y14	$lesize,all,,,6
lsla	$lsel,r,loc,x,-tbb/2,tbb/2		$lsel,r,loc,y,y15	$lesize,all,,,6
lsla	$lsel,r,loc,x,-tbb/2,tbb/2		$lsel,r,loc,y,y16	$lesize,all,,,6
lsla	$lsel,r,loc,x,-tbb/2,tbb/2		$lsel,r,loc,y,y17	$lesize,all,,,4

lsla	$lsel,r,loc,x,-tcc/2,tcc/2		$lsel,r,loc,y,y11	$lesize,all,,,10
lsla	$lsel,r,loc,x,-tcc/2,tcc/2		$lsel,r,loc,y,y12	$lesize,all,,,10
lsla	$lsel,r,loc,x,-tcc/2,tcc/2		$lsel,r,loc,y,y13	$lesize,all,,,10
lsla	$lsel,r,loc,x,-tcc/2,tcc/2		$lsel,r,loc,y,y14	$lesize,all,,,8
lsla	$lsel,r,loc,x,-tcc/2,tcc/2		$lsel,r,loc,y,y15	$lesize,all,,,8
lsla	$lsel,r,loc,x,-tcc/2,tcc/2		$lsel,r,loc,y,y16	$lesize,all,,,8
lsla	$lsel,r,loc,x,-tcc/2,tcc/2		$lsel,r,loc,y,y17	$lesize,all,,,6

lsla	$lsel,r,loc,x,-(tcc/2+t10),tcc/2+t10		$lsel,r,loc,y,y11	$lesize,all,,,8
lsla	$lsel,r,loc,x,-(tcc/2+t10),tcc/2+t10		$lsel,r,loc,y,y12	$lesize,all,,,6
lsla	$lsel,r,loc,x,-(tcc/2+t10),tcc/2+t10		$lsel,r,loc,y,y13	$lesize,all,,,6
lsla	$lsel,r,loc,x,-(tcc/2+t10),tcc/2+t10		$lsel,r,loc,y,y14	$lesize,all,,,4
lsla	$lsel,r,loc,x,-(tcc/2+t10),tcc/2+t10		$lsel,r,loc,y,y15	$lesize,all,,,4
lsla	$lsel,r,loc,x,-(tcc/2+t10),tcc/2+t10		$lsel,r,loc,y,y16	$lesize,all,,,4
lsla	$lsel,r,loc,x,-(tcc/2+t10),tcc/2+t10		$lsel,r,loc,y,y17	$lesize,all,,,2

ASEL,u,LOC,x,-(tcc/2+t10),tcc/2+t10
lsla	$lsel,r,loc,x,-(tcc/2+t10*3)	$lesize,all,,,8
lsla	$lsel,r,loc,x,  tcc/2+t10*3		$lesize,all,,,8
lsla	$lsel,r,loc,x,-(tcc/2+t10*3),tcc/2+t10*3	$lsel,r,loc,y,y9	$lesize,all,,,9
lsla	$lsel,r,loc,x,-(tcc/2+t10*3),tcc/2+t10*3	$lsel,r,loc,y,y10	$lesize,all,,,9
lsla	$lsel,r,loc,x,-(tcc/2+t10*3),tcc/2+t10*3	$lsel,r,loc,y,y11	$lesize,all,,,9
lsla	$lsel,r,loc,x,-(tcc/2+t10*3),tcc/2+t10*3	$lsel,r,loc,y,y12	$lesize,all,,,7
lsla	$lsel,r,loc,x,-(tcc/2+t10*3),tcc/2+t10*3	$lsel,r,loc,y,y13	$lesize,all,,,7
lsla	$lsel,r,loc,x,-(tcc/2+t10*3),tcc/2+t10*3	$lsel,r,loc,y,y14	$lesize,all,,,5
lsla	$lsel,r,loc,x,-(tcc/2+t10*3),tcc/2+t10*3	$lsel,r,loc,y,y15	$lesize,all,,,5
lsla	$lsel,r,loc,x,-(tcc/2+t10*3),tcc/2+t10*3	$lsel,r,loc,y,y16	$lesize,all,,,5
lsla	$lsel,r,loc,x,-(tcc/2+t10*3),tcc/2+t10*3	$lsel,r,loc,y,y17	$lesize,all,,,5

lsla	$lsel,r,loc,x,-(tcc/2+t10*6)	$lesize,all,,,6
lsla	$lsel,r,loc,x,  tcc/2+t10*6		$lesize,all,,,6
lsla	$lsel,r,loc,x,-(tcc/2+t10*6),tcc/2+t10*6	$lsel,r,loc,y,y9	$lesize,all,,,11
lsla	$lsel,r,loc,x,-(tcc/2+t10*6),tcc/2+t10*6	$lsel,r,loc,y,y10	$lesize,all,,,11
lsla	$lsel,r,loc,x,-(tcc/2+t10*6),tcc/2+t10*6	$lsel,r,loc,y,y11	$lesize,all,,,11
lsla	$lsel,r,loc,x,-(tcc/2+t10*6),tcc/2+t10*6	$lsel,r,loc,y,y12	$lesize,all,,,9
lsla	$lsel,r,loc,x,-(tcc/2+t10*6),tcc/2+t10*6	$lsel,r,loc,y,y13	$lesize,all,,,9
lsla	$lsel,r,loc,x,-(tcc/2+t10*6),tcc/2+t10*6	$lsel,r,loc,y,y14	$lesize,all,,,7
lsla	$lsel,r,loc,x,-(tcc/2+t10*6),tcc/2+t10*6	$lsel,r,loc,y,y15	$lesize,all,,,7
lsla	$lsel,r,loc,x,-(tcc/2+t10*6),tcc/2+t10*6	$lsel,r,loc,y,y16	$lesize,all,,,7
lsla	$lsel,r,loc,x,-(tcc/2+t10*6),tcc/2+t10*6	$lsel,r,loc,y,y17	$lesize,all,,,5

lsla	$lsel,r,loc,x,-LX/2	$lesize,all,,,6
lsla	$lsel,r,loc,x, LX/2	$lesize,all,,,6
lsla	$lsel,r,loc,x,-LX/2,LX/2	$lsel,r,loc,y,y9	$lesize,all,,,30
lsla	$lsel,r,loc,x,-LX/2,LX/2	$lsel,r,loc,y,y10	$lesize,all,,,26
lsla	$lsel,r,loc,x,-LX/2,LX/2	$lsel,r,loc,y,y11	$lesize,all,,,26
lsla	$lsel,r,loc,x,-LX/2,LX/2	$lsel,r,loc,y,y12	$lesize,all,,,24
lsla	$lsel,r,loc,x,-LX/2,LX/2	$lsel,r,loc,y,y13	$lesize,all,,,24
lsla	$lsel,r,loc,x,-LX/2,LX/2	$lsel,r,loc,y,y14	$lesize,all,,,22
lsla	$lsel,r,loc,x,-LX/2,LX/2	$lsel,r,loc,y,y15	$lesize,all,,,22
lsla	$lsel,r,loc,x,-LX/2,LX/2	$lsel,r,loc,y,y16	$lesize,all,,,22
lsla	$lsel,r,loc,x,-LX/2,LX/2	$lsel,r,loc,y,y17	$lesize,all,,,14


lsla	$lplot

!銅柱下方mesh
alls
lsel,s,loc,x,0	$lsel,r,loc,y,y2		$lesize,all,da
lsel,s,loc,x,0	$lsel,r,loc,y,y3-t6		$lesize,all,,,50
lsel,s,loc,x,0	$lsel,r,loc,y,y3-t6*2	$lesize,all,,,40
lsel,s,loc,x,0	$lsel,r,loc,y,y3-t6*4	$lesize,all,,,30
lsel,s,loc,x,0	$lsel,r,loc,y,y1		$lesize,all,,,20
lsel,s,loc,x,0	$lsel,r,loc,y,y0		$lesize,all,,,14

!lsel,s,loc,x,-tcc/2,tcc/2		$lsel,r,loc,y,y11	$lesize,all,,,11
!lsel,s,loc,x,-tcc/2,tcc/2	$lsel,r,loc,y,y2		$lesize,all,,,11
lsel,s,loc,x,-taa/2,taa/2	$lsel,r,loc,y,y3-t6		$lesize,all,,,14
lsel,s,loc,x,-tbb/2,tbb/2	$lsel,r,loc,y,y3-t6		$lesize,all,,,4
lsel,s,loc,x,-tcc/2,tcc/2	$lsel,r,loc,y,y3-t6		$lesize,all,,,8
lsel,s,loc,x,-taa/2,taa/2	$lsel,r,loc,y,y3-t6*2	$lesize,all,,,12
lsel,s,loc,x,-tbb/2,tbb/2	$lsel,r,loc,y,y3-t6*2	$lesize,all,,,4
lsel,s,loc,x,-tcc/2,tcc/2	$lsel,r,loc,y,y3-t6*2	$lesize,all,,,6
!lsel,s,loc,x,-(tcc/2+t10),tcc/2+t10		$lsel,r,loc,y,y2		$lesize,all,,,8
lsel,s,loc,x,-(tcc/2+t10),tcc/2+t10		$lsel,r,loc,y,y3-t6		$lesize,all,,,6
lsel,s,loc,x,-(tcc/2+t10),tcc/2+t10		$lsel,r,loc,y,y3-t6*2	$lesize,all,,,4

!銅柱側邊mesh
lsel,s,loc,x,-(tcc/2+t10*3)	$lsel,r,loc,y,y2+t3/2	$lesize,all,,,4
lsel,s,loc,x,tcc/2+t10*3	$lsel,r,loc,y,y2+t3/2	$lesize,all,,,4
lsel,s,loc,x,-(tcc/2+t10*3)	$lsel,r,loc,y,y3+t5/2	$lesize,all,,,6
lsel,s,loc,x,tcc/2+t10*3	$lsel,r,loc,y,y3+t5/2	$lesize,all,,,6
lsel,s,loc,y,y3+t5+t4/2	$lesize,all,,,1
lsel,s,loc,x,-(tcc/2+t10*3)	$lsel,r,loc,y,y5+(t6)/2	$lesize,all,,,60
lsel,s,loc,x,tcc/2+t10*3	$lsel,r,loc,y,y5+(t6)/2	$lesize,all,,,60
lsel,s,loc,x,-(tcc/2+t10*3)	$lsel,r,loc,y,y6+(t7-t9)/2	$lesize,all,,,30
lsel,s,loc,x,tcc/2+t10*3	$lsel,r,loc,y,y6+(t7-t9)/2	$lesize,all,,,30
lsel,s,loc,y,y7-t9+t9/2	$lesize,all,,,1
csys,13	$wpcsys,13
lsel,s,loc,x,-(tcc/2+t10*3)	$lsel,r,loc,y,y7+(y9-y7)/2	$lesize,all,,,3
lsel,s,loc,x,tcc/2+t10*3	$lsel,r,loc,y,y7+(y9-y7)/2	$lesize,all,,,3

lsel,s,loc,y,y2+t3/2		$lesize,all,,,2
lsel,s,loc,y,y2+t3/2		$lesize,all,,,2
lsel,s,loc,y,y3+t5/2		$lesize,all,,,4
lsel,s,loc,y,y3+t5/2		$lesize,all,,,4
lsel,s,loc,y,y5+(t6)/2		$lesize,all,,,40
lsel,s,loc,y,y5+(t6)/2		$lesize,all,,,40
lsel,s,loc,y,y6+(t7-t9)/2	$lesize,all,,,20
lsel,s,loc,y,y6+(t7-t9)/2	$lesize,all,,,20
lsel,s,loc,y,y7+(y9-y7)/2	$lesize,all,,,3


lsla	$lplot


ASEL,S,LOC,Y,Y2,Y9
!lsla	$lsel,r,loc,x,-(tcc/2+t10),tcc/2+t10		$lesize,all,,,8
lsla	$lsel,r,loc,x,-(tcc/2+t10*3),tcc/2+t10*3	$lesize,all,,,9
lsla	$lsel,r,loc,x,-(tcc/2+t10*6),tcc/2+t10*6	$lesize,all,,,11
lsla	$lsel,r,loc,x,-LX/2,LX/2					$lesize,all,,,30


!lsel,s,loc,y,y2	$lsel,r,loc,x,-(tcc/2+t10),tcc/2+t10		$lesize,all,,,8
!lsel,s,loc,y,y2	$lsel,r,loc,x,-(tcc/2+t10*3),tcc/2+t10*3	$lesize,all,,,9
!lsel,s,loc,y,y2	$lsel,r,loc,x,-(tcc/2+t10*6),tcc/2+t10*6	$lesize,all,,,11
!lsel,s,loc,y,y2	$lsel,r,loc,x,-LX/2,LX/2					$lesize,all,,,30

lsel,s,loc,y,y2-(t6-t3)/2	$lsel,r,loc,x,-(taa/2),taa/2				$lesize,all,,,50
lsel,s,loc,y,y2-(t6-t3)/2	$lsel,r,loc,x,-(tcc/2),tcc/2				$lesize,all,,,40
lsel,s,loc,y,y2-(t6-t3)/2	$lsel,r,loc,x,-(tcc/2+t10),tcc/2+t10		$lesize,all,,,40
lsel,s,loc,y,y2-(t6-t3)/2	$lsel,r,loc,x,-(tcc/2+t10*3),tcc/2+t10*3	$lesize,all,,,40
lsel,s,loc,y,y2-(t6-t3)/2	$lsel,r,loc,x,-(tcc/2+t10*6),tcc/2+t10*6	$lesize,all,,,32
lsel,s,loc,y,y2-(t6-t3)/2	$lsel,r,loc,x,-LX/2,LX/2					$lesize,all,,,32


!!!

lsel,s,loc,y,y2-(t6-t3)	$lsel,r,loc,x,-(tcc/2+t10*3),tcc/2+t10*3	$lesize,all,,,7
lsel,s,loc,y,y2-(t6-t3)	$lsel,r,loc,x,-(tcc/2+t10*6),tcc/2+t10*6	$lesize,all,,,11
lsel,s,loc,y,y2-(t6-t3)	$lsel,r,loc,x,-LX/2,LX/2					$lesize,all,,,24

lsel,s,loc,y,y2-(t6-t3)-t6/2	$lsel,r,loc,x,-(taa/2),taa/2				$lesize,all,,,40
lsel,s,loc,y,y2-(t6-t3)-t6/2	$lsel,r,loc,x,-(tcc/2),tcc/2				$lesize,all,,,36
lsel,s,loc,y,y2-(t6-t3)-t6/2	$lsel,r,loc,x,-(tcc/2+t10),tcc/2+t10		$lesize,all,,,36
lsel,s,loc,y,y2-(t6-t3)-t6/2	$lsel,r,loc,x,-(tcc/2+t10*3),tcc/2+t10*3	$lesize,all,,,30
lsel,s,loc,y,y2-(t6-t3)-t6/2	$lsel,r,loc,x,-(tcc/2+t10*6),tcc/2+t10*6	$lesize,all,,,30
lsel,s,loc,y,y2-(t6-t3)-t6/2	$lsel,r,loc,x,-LX/2,LX/2					$lesize,all,,,30

!!!

lsel,s,loc,y,y2-(t6*2-t3)	$lsel,r,loc,x,-(tcc/2+t10*3),tcc/2+t10*3	$lesize,all,,,7
lsel,s,loc,y,y2-(t6*2-t3)	$lsel,r,loc,x,-(tcc/2+t10*6),tcc/2+t10*6	$lesize,all,,,9
lsel,s,loc,y,y2-(t6*2-t3)	$lsel,r,loc,x,-LX/2,LX/2					$lesize,all,,,22

lsel,s,loc,y,y2-(t6*2-t3)-t6	$lsel,r,loc,x,-(taa/2),taa/2				$lesize,all,,,70
lsel,s,loc,y,y2-(t6*2-t3)-t6	$lsel,r,loc,x,-(tcc/2),tcc/2				$lesize,all,,,70
lsel,s,loc,y,y2-(t6*2-t3)-t6	$lsel,r,loc,x,-(tcc/2+t10),tcc/2+t10		$lesize,all,,,70
lsel,s,loc,y,y2-(t6*2-t3)-t6	$lsel,r,loc,x,-(tcc/2+t10*3),tcc/2+t10*3	$lesize,all,,,64
lsel,s,loc,y,y2-(t6*2-t3)-t6	$lsel,r,loc,x,-(tcc/2+t10*6),tcc/2+t10*6	$lesize,all,,,60
lsel,s,loc,y,y2-(t6*2-t3)-t6	$lsel,r,loc,x,-LX/2,LX/2					$lesize,all,,,50

!!!
lsel,s,loc,y,y2-(t6*4-t3)	$lsel,r,loc,x,-(taa/2),taa/2				$lesize,all,,,10
lsel,s,loc,y,y2-(t6*4-t3)	$lsel,r,loc,x,-(tbb/2),tbb/2				$lesize,all,,,2
lsel,s,loc,y,y2-(t6*4-t3)	$lsel,r,loc,x,-(tcc/2),tcc/2				$lesize,all,,,4
lsel,s,loc,y,y2-(t6*4-t3)	$lsel,r,loc,x,-(tcc/2+t10),tcc/2+t10		$lesize,all,,,4
lsel,s,loc,y,y2-(t6*4-t3)	$lsel,r,loc,x,-(tcc/2+t10*3),tcc/2+t10*3	$lesize,all,,,7
lsel,s,loc,y,y2-(t6*4-t3)	$lsel,r,loc,x,-(tcc/2+t10*6),tcc/2+t10*6	$lesize,all,,,9
lsel,s,loc,y,y2-(t6*4-t3)	$lsel,r,loc,x,-LX/2,LX/2					$lesize,all,,,22

lsel,s,loc,y,(y2-(t6*4-t3)-y1)/2+y1	$lsel,r,loc,x,-(taa/2),taa/2				$lesize,all,,,50
lsel,s,loc,y,(y2-(t6*4-t3)-y1)/2+y1	$lsel,r,loc,x,-(tcc/2),tcc/2				$lesize,all,,,50
lsel,s,loc,y,(y2-(t6*4-t3)-y1)/2+y1	$lsel,r,loc,x,-(tcc/2+t10),tcc/2+t10		$lesize,all,,,50
lsel,s,loc,y,(y2-(t6*4-t3)-y1)/2+y1	$lsel,r,loc,x,-(tcc/2+t10*3),tcc/2+t10*3	$lesize,all,,,50
lsel,s,loc,y,(y2-(t6*4-t3)-y1)/2+y1	$lsel,r,loc,x,-(tcc/2+t10*6),tcc/2+t10*6	$lesize,all,,,50
lsel,s,loc,y,(y2-(t6*4-t3)-y1)/2+y1	$lsel,r,loc,x,-LX/2,LX/2					$lesize,all,,,50

!!!
lsel,s,loc,y,y1	$lsel,r,loc,x,-(taa/2),taa/2				$lesize,all,,,6
lsel,s,loc,y,y1	$lsel,r,loc,x,-(tbb/2),tbb/2				$lesize,all,,,2
lsel,s,loc,y,y1	$lsel,r,loc,x,-(tcc/2),tcc/2				$lesize,all,,,4
lsel,s,loc,y,y1		$lsel,r,loc,x,-(tcc/2+t10),tcc/2+t10		$lesize,all,,,2
lsel,s,loc,y,y1		$lsel,r,loc,x,-(tcc/2+t10*3),tcc/2+t10*3	$lesize,all,,,3
lsel,s,loc,y,y1		$lsel,r,loc,x,-(tcc/2+t10*6),tcc/2+t10*6	$lesize,all,,,5
lsel,s,loc,y,y1		$lsel,r,loc,x,-LX/2,LX/2					$lesize,all,,,14

lsel,s,loc,y,y0+t1/2	$lsel,r,loc,x,-LX/2							$lesize,all,,,40,1/0.5
lsel,s,loc,y,y0+t1/2	$lsel,r,loc,x,-(taa/2),taa/2				$lesize,all,,,40,0.5
lsel,s,loc,y,y0+t1/2	$lsel,r,loc,x,-(tcc/2),tcc/2				$lesize,all,,,40,0.5
lsel,s,loc,y,y0+t1/2	$lsel,r,loc,x,-(tcc/2+t10),tcc/2+t10		$lesize,all,,,40,0.5
lsel,s,loc,y,y0+t1/2	$lsel,r,loc,x,-(tcc/2+t10*3),tcc/2+t10*3	$lesize,all,,,40,0.5
lsel,s,loc,y,y0+t1/2	$lsel,r,loc,x,-(tcc/2+t10*6),tcc/2+t10*6	$lesize,all,,,40,0.5
lsel,s,loc,y,y0+t1/2	$lsel,r,loc,x,-LX/2,LX/2					$lesize,all,,,40,0.5

lsel,s,loc,y,y0		$lsel,r,loc,x,-(tcc/2),tcc/2				$lesize,all,,,5
lsel,s,loc,y,y0		$lsel,r,loc,x,-(tcc/2+t10),tcc/2+t10		$lesize,all,,,2
lsel,s,loc,y,y0		$lsel,r,loc,x,-(tcc/2+t10*3),tcc/2+t10*3	$lesize,all,,,3
lsel,s,loc,y,y0		$lsel,r,loc,x,-(tcc/2+t10*6),tcc/2+t10*6	$lesize,all,,,5
lsel,s,loc,y,y0		$lsel,r,loc,x,-LX/2,LX/2					$lesize,all,,,10


ALLSEL
lsla	$lplot

!!!!!!!!!!!!!!!!!!!!!!!!!!!!!!!!!!!!!!!!!你哪裡知道我就這樣吐了mesh


!------------

!Mesh
csys,13	$wpcsys,13
MSHKEY,0
MSHAPE,0
TYPE,1


*do,I,1,2,1
MAT,I
ASEL,s,LOC,Y,y%I-1%,y%I%
AMESH,ALL
*enddo
alls
*do,I,10,17,1
MAT,I
ASEL,s,LOC,Y,y%I-1%,y%I%
AMESH,ALL
*enddo
alls


!cu pillar
MP,Ex,1+Layer+Layer,ECu*1e3
MP,PRXY,1+Layer+Layer,VCu
MAT,1+Layer+Layer
ASEL,S,LOC,Y,Y3,Y6	$ASEL,R,LOC,X,-tcc/2,tcc/2	$ASEL,u,,,28	$asel,u,,,112
asel,u,,,29	$asel,u,,,103	$asel,u,,,118	$asel,u,,,124	$cmsel,u,DUBMA
AMESH,ALL
alls


!SnAg
MP,Ex,2+Layer+Layer,ESnAg*1e3
MP,PRXY,2+Layer+Layer,VSnAg
MAT,2+Layer+Layer
ASEL,S,LOC,Y,Y6,Y9	$ASEL,R,LOC,X,-tcc/2,tcc/2	$ASEL,u,,,72
$ASEL,u,,,73	$ASEL,u,,,31	$ASEL,u,,,97	$ASEL,u,,,36	$ASEL,u,,,43	$cmsel,u,tUBMA
AMESH,ALL
alls


!UBM
MP,Ex,3+Layer+Layer,EUBM*1e3
MP,PRXY,3+Layer+Layer,VUBM
MAT,3+Layer+Layer
cmsel,s,DUBMA	$cmsel,a,TUBMA
AMESH,ALL

!Al pad
MP,Ex,4+Layer+Layer,EAl*1e3
MP,PRXY,4+Layer+Layer,VAl
MAT,4+Layer+Layer
ASEL,s,LOC,Y,y2,y3	$ASEL,R,LOC,X,0
AMESH,ALL
!SiNx
MP,Ex,5+Layer+Layer,ESiNx*1e3
MP,PRXY,5+Layer+Layer,VSiNx
MAT,5+Layer+Layer
ASEL,s,LOC,Y,y2,y3	$ASEL,u,LOC,X,0
AMESH,ALL


!PI
MAT,5+layer
ASEL,s,LOC,Y,y3,y5-t4
AMESH,ALL
!Underfill
MAT,6+layer
ASEL,s,LOC,Y,y5-t4,y6
AMESH,ALL
!Underfill
MAT,7+layer
ASEL,s,LOC,Y,y6,y7
AMESH,ALL
!D1
MAT,8+layer
ASEL,s,LOC,Y,y7,Y9
AMESH,ALL


!*do,I,4,9,1
!MAT,I+layer
!ASEL,s,LOC,Y,y%I-1%,y%I%
!AMESH,ALL
!*enddo
alls
!nummrg,node
									SAVE


!!!!!--------------------------------------------暈囉魚鰓咧

/prep7
csys,0	$wpcsys,0
LSEL,S,loc,x,Lw+0	$LSEL,A,loc,x,Lw+Lx
LSEL,A,loc,y,0	$LSEL,A,LOC,Y,Y17
NSLL,S,1
!alls
NWRITE,ppackage-sub,node
alls
save	$fini
